# Materials Studio Generated CAR File

units             real
atom_style        full
boundary          p p p

pair_style        lj/cut/coul/long 10.0
pair_modify       mix arithmetic
bond_style        harmonic
angle_style       harmonic
dihedral_style    fourier
improper_style    cvff
kspace_style      pppm 1.0e-4

read_data         cs.data

group cof         type 1 2 3 4 5 6 7 8 9 10 11 12
group Br          type 13
group water       type 14 15
group ow          type 14
group hw          type 15
group pbe         type 16
group pup         type 17
group pboth       type 16 17
group Cs          type 18
group Cl          type 19
group freeze      type 1 2 3 4 5 6 7 8 9 10 11 12 16 17
group liquid      type 13 14 15 18 19
group pm          type 8 9 10 11 12

neighbor          2.0 bin
neigh_modify      every 1 delay 0 check yes
neigh_modify      one 5000

restart           1000 restart.1 restart.2

timestep          1.0

# ---------------------------- Minimization ----------------------------
thermo            10
thermo_style      custom step cpu etotal
thermo_modify     flush yes
fix               freeze_min freeze setforce  0.0  0.0  0.0
minimize          1.0e-5 1.0e-5 1000 1000
# ---------------------------- Equilibrium -----------------------------
unfix             freeze_min

velocity          liquid create 300.0 1491119213 mom yes rot yes dist gaussian

variable          n equal z[13481]
fix               4 all colvars mix.colvars

thermo            1000
thermo_style      custom step cpu etotal temp v_n
thermo_modify     flush yes

dump              1 all custom 10000 equilibrium.lammpstrj id type x y z
dump_modify       1 sort id

fix               1 water shake 1e-5 2000 0 b 34 a 206

compute           all_temp liquid temp/com
fix               2 liquid  nve
fix               3 liquid  temp/berendsen 300.0 300.0 100.0
fix_modify        3 temp all_temp

run               50000000
#write_data        md.lmps pair ij
