# Materials Studio Generated CAR File

units             real
atom_style        full
boundary          p p p

pair_style        lj/cut/coul/long 10.0
pair_modify       mix arithmetic
bond_style        harmonic
angle_style       harmonic
dihedral_style    fourier
improper_style    cvff
kspace_style      pppm 1.0e-4
#kspace_modify     slab 3.0

read_data         pssna.data

group 2ClBen      type 1 2 3
group water       type 4 5
group ow          type 4
group hw          type 5
group PSS         type 6 7 8 9 10 11
group na          type 12
group HBAB        type 13 14 15 16 17 18 19 20 21 22
group br          type 23
group pbe         type 24
group pup         type 25
group pboth       type 24 25
group freeze      type 24 25
group liquid      type 1 2 3 4 5 6 7 8 9 10 11 12 13 14 15 16 17 18 19 20 21 22 23
group push        id 11185
group pull        molecule 901

neighbor          2.0 bin
neigh_modify      every 1 delay 0 check yes
neigh_modify      one 5000

#neigh_modify      exclude group pbe pbe
#neigh_modify      exclude group pup pup

#compute           cpbe pbe reduce ave z
#compute           cpup pup reduce ave z

restart           1000 restart.1 restart.2

timestep          1

# ---------------------------- Minimization ----------------------------
#thermo            10
#thermo_style      custom step cpu etotal
#thermo_modify     flush yes
#fix               freeze_min freeze setforce  0.0  0.0  0.0
#minimize          1.0e-5 1.0e-5 1000 1000
# ---------------------------- Equilibrium -----------------------------
#unfix             freeze_min

velocity          liquid create 300.0 1491119213 mom yes rot yes dist gaussian

dump              1 all custom 10000 equilibrium.lammpstrj id type x y z
dump_modify       1 sort id

fix               1 water shake 1e-5 2000 0 b 4 a 4
fix               2 water nvt temp 300.0 300.0 100.0
fix               7 2ClBen nvt temp 300.0 300.0 100.0
fix               8 PSS rigid/nvt molecule temp 300.0 300.0 100
fix               9 na nvt temp 300.0 300.0 100.0
fix               10 HBAB nvt temp 300.0 300.0 100.0
fix               11 br nvt temp 300.0 300.0 100.0

fix               12 all colvars pssna.colvars

compute           cpull pull com
variable          zcpull equal c_cpull[3]

region            bottom block EDGE EDGE EDGE EDGE 131 141
group             resgrp region bottom
group             resgrp include molecule
fix               restraint resgrp spring/self 0.1

#fix               3 pboth setforce 0.0 0.0 NULL
#fix               4 pbe aveforce 0.0 0.0 0
#fix               5 pup aveforce 0.0 0.0 0
#fix               6 pboth nve

thermo            1000
thermo_style      custom step cpu etotal temp v_zcpull
thermo_modify     flush yes

run               30000000
#write_data        md.lmps pair ij
